# minimal for python
# ---------- Initialize Simulation ---------------------
variable alat equal 3.304
variable xdim equal ${alat}*5
variable T equal 0.001
variable T2 equal 0.5
variable tstep equal 0.002
variable runtime equal 2000000
variable Srandomseed equal 1001

clear
units metal
dimension 3
boundary p p p
atom_style atomic

# ---------- Create Atomistic Structure ---------------------
#read_data Mg_hcp.lmp 		#setting up the system
read_data bcc_432_atoms

# ---------- Define Interatomic Potential ---------------------
pair_style eam/fs
pair_coeff * * Ta_orig_FS.eam2.alloy Ta
neighbor        2.0 bin
neigh_modify    delay 5

timestep ${tstep}

# ----- perform MD -------
velocity all create ${T2} ${Srandomseed}
fix 1 all npt temp ${T2} ${T} 0.01 iso 0.0 0.0 2

#----- end MD ------
thermo 10000
thermo_style custom step lx lx ly lz atoms temp pe lx ly lz press pxx pyy pzz
thermo_modify lost ignore flush yes

compute KE all ke/atom
compute PE all pe/atom

#dump 1 all custom 100 out_100/*.chkpt id type mass x y z
dump  1 all custom 2000 output-*.txt id type x y z mass c_KE c_PE


run ${runtime}

write_data relaxed_*.lmp
